ORIGIN := 1
result(N, U, V) :=
    for j ∈ (1 .. 30)
        (R[j] ← U[j]) if V[j] < 8
        (R[j] ← N[j]) otherwise
    R
X := runif(30, 0, 100)
Ys := rnorm(30, 2, 1)
Yn := rnorm(30, 2, 1.6) = [1.57001; 1.98082; 2.97069; 0.00136179; 1.15975; 2.08144; 1.4353; 2.67592; -0.645479; 3.78298; -1.0131; 3.3293; 1.12875; 4.29247; 0.725455; 3.93526; 3.13513; 3.63818; 1.66592; 3.85799; 1.99403; 4.11652; 1.32318; 1.23618; 0.288254; -0.194756; 3.34957; 2.4422; 3.14456; 2.47494]
Z := result(Yn, Ys, X)
i := 1 .. 30
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ZZ := sort(Z)
med := 1/2*(2.5 + 2.6)
med = 2.55
ZZ = [-1.0131; -0.645479; -0.194756; 0.00136179; 0.249358; 0.288254; 0.725455; 1.12875; 1.15975; 1.23618; 1.32318; 1.4353; 1.57001; 1.66592; 1.98082; 1.99403; 2.08144; 2.27559; 2.4422; 2.47494; 3.13513; 3.14456; 3.3293; 3.34957; 3.63818; 3.78298; 3.85799; 3.93526; 4.11652; 4.29247]
Zs := sum(Z[j], j = 1 .. 25)/25
Zs = 1.90179
D := sum((Z[i] - Zs)^2, i = 1 .. 25)/29
D = 1.94847
IZ :=
    for i ∈ (1 .. 25)
        (IZZ[i] ← |Z[i] - medZ|)
    IZZ  # error: Эта переменная не определена.
IZM1 := sort(IZ)  # error: Эта переменная не определена.
S1 := ((IZM1[14] + IZM1[15])/2)  # error: Эта переменная не определена.
Sust := S1/0.675  # error: Эта переменная не определена.
Sust =  # error: Эта переменная не определена.
Z[1] := Z[3]
Z[2] := Z[3]
Z[29] := Z[28]
Z[30] := Z[28]
Mwin := sum(Z[i], i = 1 .. 30)/30
Mwin = 1.83247
Z = [0.249358; 0.249358; 0.249358; 0.00136179; 1.15975; 2.08144; 1.4353; 2.27559; -0.645479; 3.78298; -1.0131; 3.3293; 1.12875; 4.29247; 0.725455; 3.93526; 3.13513; 3.63818; 1.66592; 3.85799; 1.99403; 4.11652; 1.32318; 1.23618; 0.288254; -0.194756; 3.34957; 2.4422; 2.4422; 2.4422]
